// COMSOL Multiphysics 6.4.0.429 model "v1 5gap coarse_reeval.mph"
// Outline of the model tree

Parameters
  w_c = 52[um]  // Center-channel full width
  w_s = 44[um]  // Side-channel width (V1)
  gap = 19[um]  // Center-to-side gap (perpendicular)
  L_post = 27[um]  // Post length along x
  L_gap_x = 22[um]  // Gap length along x
  depth = 140[um]  // Channel depth (z)
  n_gaps = 5  // Number of gaps in slab
  pitch = L_post + L_gap_x  // Periodic pitch (49 μm)
  L_total = (n_gaps+1)*L_post + n_gaps*L_gap_x  // Slab total length along x
  Ly_half = w_c/2 + gap + w_s  // Half-cross-section in y (89 μm)
  mu_PRP = 1.2[mPa*s]  // PRP viscosity at 37 °C (Dinh paper)
  p_in = 100[Pa]  // Inlet pressure (arbitrary; Stokes is linear)
  p_out = 0[Pa]  // Outlet pressure (reference level)
  mesh_gap = 1[um]  // Element size at gap throats
  mesh_bulk = 5[um]  // Element size in bulk channels

Selections
  box1: Box "Inlet Center"
    entitydim = 2
    xmin = -1
    xmax = 1
    ymin = 0
    ymax = w_c/2 + 1[um]
    zmin = -1[um]
    zmax = depth + 1[um]
    condition = inside
  box2: Box "Outlets"
    entitydim = 2
    xmin = L_total - 1[um]
    xmax = L_total + 1[um]
    ymin = 0
    ymax = Ly_half + 1[um]
    zmin = -1[um]
    zmax = depth + 1[um]
    condition = inside
  box3: Box "Outlet Center Only"
    entitydim = 2
    xmin = L_total - 1[um]
    xmax = L_total + 1[um]
    ymin = 0
    ymax = w_c/2 + 1[um]
    zmin = -1[um]
    zmax = depth + 1[um]
    condition = inside
  box4: Box "Outlet Side Only"
    entitydim = 2
    xmin = L_total - 1[um]
    xmax = L_total + 1[um]
    ymin = w_c/2 + gap - 1[um]
    ymax = Ly_half + 1[um]
    zmin = -1[um]
    zmax = depth + 1[um]
    condition = inside
  box5: Box "Symmetry y0"
    entitydim = 2
    xmin = -1[um]
    xmax = L_total + 1[um]
    ymin = -1[um]
    ymax = 1[um]
    zmin = -1[um]
    zmax = depth + 1[um]
    condition = inside

Geometry
  geom1 "Geometry 1" (3D, length unit µm)
    blk1: Block "Center half-channel" | size = {L_total, w_c/2, depth}
    blk2: Block "Side channel" | size = {L_total, w_s, depth}; pos = {0, w_c/2 + gap, 0}
    blk3: Block "Gap prototype" | size = {L_gap_x, gap, depth}; pos = {L_post, w_c/2, 0}
    arr1: Array
      input = blk3
      size = n_gaps
      type = linear
      linearsize = n_gaps
      displ = {pitch, 0, 0}
      indexattrtag = arr1.index
      indexattrtags = {arr1.index1, arr1.index2, arr1.index3}
    fin: Finalize "Form Union"

Materials
  mat1: Common "PRP at 37 °C"
    def: def "Basic"
      dynamicviscosity = mu_PRP
      density = 1000

Physics
  spf: CreepingFlow on all domains
    dependent variable u = {u, v, w}
    fp1: FluidProperties (default) | rho_mat = userdef; rho = 1000[kg/m^3]; mu_mat = userdef; mu = mu_PRP
    init1: init "Initial Values 1" (default)
    wallbc1: WallBC "Wall 1" (default)
    inl1: InletBoundary "Inlet Center" on selection box1 | BoundaryCondition = Pressure; p0 = p_in
    out1: OutletBoundary "Outlets" on selection box2 | p0 = p_out
    sym1: Symmetry on selection box5

Mesh
  mesh1 "Mesh 1" (physics-controlled)
    size: MeshSizeDefault | table = cfd; hauto = 8

Studies
  std1 "Study 1"
    stat: Stationary

Solver configurations
  sol1 "Solution 1" (study std1)
    v1: Variables "Dependent Variables 1"
    s1: Stationary "Stationary Solver 1"
      fc1: FullyCoupled
      dDef: Direct | linsolver = pardiso

Datasets
  dset1: Solution | solution = sol1
  surf1: Surface "Exterior Walls" on boundaries 3-11, 13, 14, 16-19, 21, 22, 24-27, 29, 30, 32-35, 37, 38, 40-43, 45, 46, 48-50
    data = dset1
  cpt1: CutPoint3D "Center pressure points"
    data = dset1
    pointx = 38, 87, 136, 185, 234
    pointy = 0, 0, 0, 0, 0
    pointz = 70, 70, 70, 70, 70
  cpt2: CutPoint3D "Side pressure points" | data = dset1; pointx = 38, 87, 136, 185, 234; pointy = 67; pointz = 70
  cpl1: CutPlane "V1_coarse_middepth_speed" | data = dset1; quickplane = xy; quickz = 70

Derived values
  int1: IntSurface "Q_in" on selection box1 | data = dset1; table = tbl1; expr = u
  int2: IntSurface "Q_c_out" on selection box3 | data = dset1; table = tbl2; expr = u
  int3: IntSurface "Q_s_out_top" on selection box4 | data = dset1; table = tbl3; expr = u
  pev1: EvalPoint "Center Channel Pressure" | data = cpt1; table = tbl4; expr = p
  pev2: EvalPoint "Side Channel Pressure" | data = cpt2; table = tbl5; expr = p

Plots
  pg1: PlotGroup3D "Velocity (spf)" | data = dset1
    slc1: Slice | expr = spf.U
  pg2: PlotGroup3D "Pressure (spf)" | data = surf1
    surf1: Surface | expr = p
      tran1: Transparency
  pg3: PlotGroup2D "2D Plot Group 3" | data = cpl1
    surf1: Surface | expr = spf.U

Exports
  tbl1: Table | table = tbl1; filename = C:\Users\ahroutt\Documents\reeval\v1 5gap coarse\table1.txt
  tbl2: Table | table = tbl2; filename = C:\Users\ahroutt\Documents\reeval\v1 5gap coarse\table2.txt
  tbl3: Table | table = tbl3; filename = C:\Users\ahroutt\Documents\reeval\v1 5gap coarse\table3.txt
  tbl4: Table | table = tbl4; filename = C:\Users\ahroutt\Documents\reeval\v1 5gap coarse\table4.txt
  tbl5: Table | table = tbl5; filename = C:\Users\ahroutt\Documents\reeval\v1 5gap coarse\table5.txt
  data1: Data
    data = dset1
    expr = {u, v, w, p}
    filename = C:\Users\ahroutt\Documents\reeval\v1 5gap coarse\V1_coarse_middepth_z70.txt
    location = grid
    gridx3 = range(0,0.5,272)
    gridy3 = range(0,0.5,89)
    gridz3 = 70
  data2: Data
    data = dset1
    expr = {u, v, w, p}
    filename = C:\Users\ahroutt\Documents\reeval\v1 5gap coarse\V1_coarse_gapplane_y35p5.txt
    location = grid
    gridx3 = range(0,0.25,272)
    gridy3 = 35.5
    gridz3 = range(0,1,140)