// COMSOL Multiphysics 6.4.0.429 model "runB_5e-4_developed.mph"
// Outline of the model tree

Parameters
  w_c = 100[um]
  w_s = 60[um]
  gap = 20[um]
  depth = 140[um]
  L_gap_x = 20[um]
  L_entry = 100[um]
  L_exit = 60[um]
  L_x = L_entry + L_gap_x + L_exit
  Q0 = 20[ul/min]
  frac = 5e-4
  A_in = (w_c/2)*(depth/2)
  A_side = w_s*(depth/2)
  U_in = Q0/A_in
  U_side = frac*Q0/A_side
  Q_gap = frac*Q0

Selections
  box1: Box "Inlet_Center"
    entitydim = 2
    xmin = -1
    xmax = 1
    ymin = -1
    ymax = w_c/2+1
    zmin = -1
    zmax = depth/2+1
    condition = inside
  box2: Box "Outlet_Center"
    entitydim = 2
    xmin = L_x-1[um]
    xmax = L_x+1[um]
    ymin = -1[um]
    ymax = w_c/2+1[um]
    zmin = -1[um]
    zmax = depth/2+1[um]
    condition = inside
  box3: Box "Outlet_Side"
    entitydim = 2
    xmin = L_x-1[um]
    xmax = L_x+1[um]
    ymin = w_c/2+gap-1[um]
    ymax = w_c/2+gap+w_s+1[um]
    zmin = -1[um]
    zmax = depth/2+1[um]
    condition = inside
  box4: Box "Sym_y0"
    entitydim = 2
    xmin = -1[um]
    xmax = L_x+1[um]
    ymin = -1[um]
    ymax = 1[um]
    zmin = -1[um]
    zmax = depth/2+1[um]
    condition = inside
  box5: Box "Sym_zmid"
    entitydim = 2
    xmin = -1[um]
    xmax = L_x+1[um]
    ymin = -1[um]
    ymax = w_c/2+gap+w_s+1[um]
    zmin = depth/2-1[um]
    zmax = depth/2+1[um]
    condition = inside
  box6: Box "Wall_gap"
    entitydim = 2
    xmin = L_entry-30[um]
    xmax = L_entry+L_gap_x+15[um]
    ymin = w_c/2-1[um]
    ymax = w_c/2+1[um]
    zmin = -1[um]
    zmax = depth/2+1[um]
    condition = inside

Couplings
  intop1: Integration "intop_in" on selection box1 | opname = intop_in
  intop2: Integration "intop_cout" on selection box2 | opname = intop_cout
  intop3: Integration "intop_sout" on selection box3 | opname = intop_sout

Geometry
  geom1 "Geometry 1" (3D, length unit µm)
    blk1: Block "Center Half-Channel" | size = {L_x, w_c/2, depth/2}
    blk2: Block "Gap Aperture" | size = {L_gap_x, gap, depth/2}; pos = {L_entry, w_c/2, 0}
    blk3: Block "side channel" | size = {L_x, w_s, depth/2}; pos = {0, w_c/2+gap, 0}
    fin: Finalize "Form Union"

Materials
  mat1: Common "PRP" on all domains
    def: def "Basic"
      density = 1000[kg/m^3]
      dynamicviscosity = 1.2[mPa*s]

Physics
  spf: CreepingFlow on all domains
    dependent variable u = {u, v, w}
    fp1: FluidProperties (default)
    init1: init "Initial Values 1" (default)
    wallbc1: WallBC "Wall 1" (default)
    inl1: InletBoundary "Inlet 1" on selection box1 | BoundaryCondition = FullyDevelopedFlow; U0in = U_in; Uavfdf = U_in
    out1: OutletBoundary "Outlet 1" on selection box2 | NormalFlow = 1
    out2: OutletBoundary "Outlet 2" on selection box3 | BoundaryCondition = Velocity; U0out = U_side
    sym1: Symmetry on selection box4
    sym2: Symmetry on selection box5

Mesh
  mesh1 "Mesh 1"
    size: MeshSizeDefault | hmax = 8[um]; hgrad = 1.3; hauto = 7
    size1: Size on selection box6 | table = cfd; hmax = 3[um]; custom = on
    bl1: BndLayer "Boundary Layers 1" on entire geometry
      blp: BndLayerProp "Boundary Layer Properties" on selection box6
        blstretch = 1.3
        inittype = blhmin
        blhmin = 0.1[um]
    ftet1: FreeTet "Free Tetrahedral 1" on remaining entities | smoothcontrol = on; optcurved = on

Studies
  std1 "Study 1"
    stat: Stationary

Solver configurations
  sol1 "Solution 1" (study std1)
    v1: Variables "Dependent Variables 1"
    s1: Stationary "Stationary Solver 1"
      fc1: FullyCoupled
      dDef: Direct | linsolver = pardiso

Datasets
  dset1: Solution | solution = sol1
  surf1: Surface "Exterior Walls" on boundaries 3, 5-8, 10, 11, 13, 16-18 | data = dset1
  cpl1: CutPlane "δ_skim"
    data = dset1
    planetype = general
    genmethod = pointnormal
    genpnpoint = {75[um], 0, 0}
    genpnvec = {1, 0, 0}
  cpl2: CutPlane | data = dset1; quickplane = xy; quickz = 70

Derived values
  int1: IntSurface "Q_in" on selection box1 | data = dset1; table = tbl1; expr = u
  int2: IntSurface "Q_cout" on selection box2 | data = dset1; table = tbl2; expr = u
  int3: IntSurface "Q_sout" on selection box3 | data = dset1; table = tbl3; expr = u
  gev1: EvalGlobal "Global Evaluation 1"
    data = dset1
    table = tbl4
    expr = {intop_in(u), intop_cout(u), intop_sout(u), (intop_in(u)-intop_cout(u)-intop_sout(u))/intop_in(u), intop_sout(u)/intop_in(u)}

Plots
  pg1: PlotGroup3D "Velocity (spf)" | data = dset1
    slc1: Slice | expr = u; quickplane = zx; genmethod = pointnormal
  pg2: PlotGroup3D "Pressure (spf)" | data = surf1
    surf1: Surface | expr = p
      tran1: Transparency
  pg3: PlotGroup2D "2D Plot Group 3" | data = cpl2
    surf1: Surface | expr = spf.U
  pg4: PlotGroup2D "2D Plot Group 4" | data = cpl2

Exports
  data1: Data
    data = dset1
    expr = {u, v, w}
    filename = C:\Users\ahroutt\Documents\reeval\cif_funnel_runB\runB_5e-4_developed\upstream_grid_frac5e-4 v3.txt
    location = grid
    gridx3 = 75
    gridy3 = range(0,0.05,50)
    gridz3 = range(0,1,70)
  data2: Data
    data = dset1
    expr = {u, v, w}
    filename = C:\Users\ahroutt\Documents\reeval\cif_funnel_runB\runB_5e-4_developed\middepth_grid_frac5e-4.txt
    location = grid
    gridx3 = range(60,0.5,140)
    gridy3 = range(0,0.1,75)
    gridz3 = 70
  tbl1: Table | table = tbl1; filename = C:\Users\ahroutt\Documents\reeval\cif_funnel_runB\runB_5e-4_developed\Table 1.txt
  tbl2: Table | table = tbl2; filename = C:\Users\ahroutt\Documents\reeval\cif_funnel_runB\runB_5e-4_developed\Table 2.txt
  tbl3: Table | table = tbl3; filename = C:\Users\ahroutt\Documents\reeval\cif_funnel_runB\runB_5e-4_developed\Table 3.txt
  tbl4: Table | table = tbl4; filename = C:\Users\ahroutt\Documents\reeval\cif_funnel_runB\runB_5e-4_developed\Table 4.txt